# Линейная интерполяция
a := [1, 0; 2, 3; 4, 6; 8, 5]
X := a[:, 0]
aa := csort(a, 0)
Y := a[:, 1]
f(x) := linterp(X, Y, x)
f(2) = 3
f(7) = 5.25
# Сплайновая интерполяция
SS := cspline(X, Y)
fs(x) := interp(SS, X, Y, x)
fs(2) = 3
fs(7) = 5.67857
i := 0 .. length(X) - 1
scale := 100
j := 0 .. scale
x[j] := min(X) + j*(max(X) - min(X))/scale
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# Линейная регрессия
# Исходные данные
VX := [3; 2; 4; 5]
VY := [7; 8; 9; 5]
ORIGN := 1
VX := csort(VX, 0)
# Коэффициенты линейной регрессии
a := intercept(VX, VY)
b := slope(VX, VY)
i := 1 .. 6
VX = [2; 3; 4; 5]
VY := [8; 7; 9; 5]
f(x) := a + b*x
b = -0.5
a = 9
corr(VX, VY) = -0.52915
f(3) = 7.5
linterp(VX, VY, 3) = 7
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# Линейная регрессия общего вида
VX := [3; 2; 4; 5]
VY := [7; 8; 9; 5]
VX := csort(VX, 0)
VY := [8; 7; 9; 5]
F(x) := [1/x; x; x^2; x^3]
VX = [2; 3; 4; 5]
K := linfit(VX, VY, F)
g(t) := K*F(t)
R^2 = 0.308642 K^2
sum(vectorize(g(VX) - mean(VY))^2)/sum(vectorize(VY - mean(VY))^2) = 1
# Коэффициент детерминации
i := 0 .. 4
r := 1, 1.25 .. 5
K = [42.8571; -22.1429; 10; -1.14286]
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# Полиномиальная регрессия
VX = [2; 3; 4; 5]
VY = [8; 7; 9; 5]
k := 3
z := regress(VX, VY, k)
F(x) := interp(z, VX, VY, x)
Coeffs := submatrix(z, 3, length(z) - 1, 0, 0)
transpose(Coeffs) = [55, -47.5, 15, -1.5]
sum(vectorize(F(VX) - mean(VY))^2)/sum(vectorize(VY - mean(VY))^2) = 1
i := 0 .. 6
j := 0 .. 50
tx[j] := min(VX) + j*((max(VX) - min(VX))/50)
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# Нелинейная регрессия общего вида
F(a, b, x) := a*exp(-b*x) + a*b
ORIGIN := 1
VX = [2; 3; 4; 5]
VS := [2; 2]
VY = [8; 7; 9; 5]
F1(x, k) := [k[1]*exp(-k[2]*x) + k[1]*k[2]; exp(-k[2]*x) + k[2]; -k[1]*x*exp(-k[2]*x) + k[1]]
P := genfit(VX, VY, VS, F1)
G(x) := F1(x, P)[1]
x := 0, 0.1 .. 40
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