# Задание №1
z(x, y) := sin(x*y)
i := 0 .. 20
j := 0 .. 20
x[i] := (i - 10)/5
y[j] := (j - 10)/5
M[i, j] := z(x[i], y[j])
# [component: inputs M]
# [component: inputs z]
# Задание №2
H(u, v) := 7*cos(u*v)
u[0] := -2
u[1] := 2
v[1] := 2
v[0] := -2
C := CreateMesh(H, u[0], u[1], v[0], v[1])
# [component: inputs C]
# Задание №3
f(x) := tan(x^2)
a := -2
b := 2
mesh := 30
F(u, v) := u
G(u, v) := f(u)*v*v
H(u, v) := f(u)*3*v
S := CreateMesh(F, G, H, a, b, 0, 2*π, mesh)
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# [component: inputs S]
